*Heading
** Job name: CurvedBar Model name: Model-1
** Generated by: Abaqus/CAE Student Edition 2017
*Preprint, echo=NO, model=NO, history=NO, contact=NO
**
** PARTS
*Include, INPUT=Param.inp
**
*Parameter
e0 = (s0/gk)**(1/ln)
**
*Part, name=Part-1
*Node
      1,           0.,          10.
      2,           0.,   8.33333302
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*Element, type=CPS4
 1,   1,   2,   9,   8
 2,   2,   3,  10,   9
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*Nset, nset=Set-1, generate
   1,  112,    1
*Elset, elset=Set-1, generate
  1,  90,   1
** Section: Section-1
*Solid Section, elset=Set-1, material=Material-1
1.2,
*End Part
**
**
** ASSEMBLY
**
*Assembly, name=Assembly
**
*Instance, name=Part-1-1, part=Part-1
*End Instance
**
*Nset, nset=Set-1, instance=Part-1-1, generate
 1,  7,  1
*Elset, elset=Set-1, instance=Part-1-1, generate
 1,  6,  1
*Nset, nset=Set-2, instance=Part-1-1, generate
   7,  112,    7
*Elset, elset=Set-2, instance=Part-1-1, generate
  6,  90,   6
*Nset, nset=Set-3, instance=Part-1-1, generate
 106,  112,    1
*Elset, elset=Set-3, instance=Part-1-1, generate
 85,  90,   1
*End Assembly
**
** MATERIALS
**
*Material, name=Material-1
*User Material, constants=11
0,0,<ym>,<nu>,0,2,<gk>,<e0>
<ln>,0,0
**
**
*DEPVAR
4
**
** ----------------------------------------------------------------
**
** STEP: Step-1
**
*Step, name=Step-1, nlgeom=YES
*Static
0.001, 1., 1e-05, 1.
**
** BOUNDARY CONDITIONS
**
** Name: BC-1 Type: Symmetry/Antisymmetry/Encastre
*Boundary
Set-1, XSYMM
** Name: BC-2 Type: Symmetry/Antisymmetry/Encastre
*Boundary
Set-2, YSYMM
** Name: BC-3 Type: Displacement/Rotation
*Boundary
Set-3, 1, 1, 3.
Set-3, 2, 2
**
** OUTPUT REQUESTS
**
*Restart, write, frequency=0
**
** FIELD OUTPUT: F-Output-1
**
*Output, field
*Node Output
CF, COORD, RF, U
*Element Output, directions=YES
EVOL, LE, PE, PEEQ, PEMAG, S
*Contact Output
CDISP, CSTRESS
**
** HISTORY OUTPUT: H-Output-1
**
*Output, history, variable=PRESELECT
*End Step
