*Heading
** Job name: Double-Notched-2D Model name: Model-1
** Generated by: Abaqus/CAE 2019
*Preprint, echo=NO, model=NO, history=NO, contact=NO
**
** PARTS
**
*Part, name=Part-1
*Node
      1,         22.5,          11.
      2,         22.5,         67.5
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*Element, type=CPS4R
   1,    1,   13,  605,  224
   2,   13,   14,  606,  605
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*Nset, nset=Set-1, generate
     1,  10840,      1
*Elset, elset=Set-1, generate
     1,  10584,      1
*Orientation, name=Ori-1
1., 0., 0., 0., 1., 0.
3, 90.
** Section: Section-1
*Solid Section, elset=Set-1, orientation=Ori-1, controls=EC-1, material=Material-1
 0.74,
*Hourglass Stiffness
 384.615, , 0., 0.
*End Part
**
**
** ASSEMBLY
**
*Assembly, name=Assembly
**
*Instance, name=Part-1-1, part=Part-1
*End Instance
**
*Nset, nset=Bottom_Edge, instance=Part-1-1
  10,  11, 462, 463, 464, 465
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*Elset, elset=Bottom_Edge, instance=Part-1-1, generate
  6159,  10584,     75
*Nset, nset=ROI, instance=Part-1-1
    4,    5,    7,    8,  225,  226
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*Elset, elset=ROI, instance=Part-1-1, generate
 4501,  6084,     1
*Nset, nset=Top_Edge, instance=Part-1-1
   2,   3,  87,  88,  89,  90
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*Elset, elset=Top_Edge, instance=Part-1-1, generate
   75,  4500,    75
*End Assembly
**
** ELEMENT CONTROLS
**
*Section Controls, name=EC-1, hourglass=STIFFNESS
1., 1., 1.
**
** MATERIALS
**
*Material, name=Material-1
*Depvar
      4,
*User Material, constants=16
0., 0., 200000., 0.3, 1, 0.257171, 0.357013, 0.642987
1.5, 1.5, 2.75409, 1., 256.0, 855.0, 0., 0.
*User Output Variables
      2,
**
** BOUNDARY CONDITIONS
**
** Name: Displacement Type: Displacement/Rotation
*Boundary
Top_Edge, 1, 1
Top_Edge, 2, 2
Top_Edge, 6, 6
** Name: Encastre Type: Symmetry/Antisymmetry/Encastre
*Boundary
Bottom_Edge, ENCASTRE
** ----------------------------------------------------------------
**
** STEP: Step-1
**
*Step, name=Step-1, nlgeom=YES, inc=10000
*Static
0.01, 1., 1e-05, 0.01
**
** BOUNDARY CONDITIONS
**
** Name: Displacement Type: Displacement/Rotation
*Boundary
Top_Edge, 2, 2, 6.75
**
** OUTPUT REQUESTS
**
*Restart, write, frequency=0
**
** FIELD OUTPUT: F-Output-1
**
*Output, field
*Node Output
COORD, RF, U
*Element Output, directions=YES
EVOL, LE, S, SDV, UVARM,
*Output, history, frequency=0
*End Step
