*Heading
** Job name: Double-Notched-Rossi Model name: Model-1
** Generated by: Abaqus/CAE 2019
*Preprint, echo=NO, model=NO, history=NO, contact=NO
**
** PARTS
**
*Part, name=Part-1
*Node
      1,          50.,          25.
      2,          50.,         150.
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*Element, type=CPS4R
   1,    1,   13,  501,  193
   2,   13,   14,  502,  501
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*Nset, nset=Set-1, generate
    1,  7448,     1
*Elset, elset=Set-1, generate
    1,  7231,     1
*Orientation, name=Ori-1
1., 0., 0., 0., 1., 0.
3, 90.
** Section: Section-1
*Solid Section, elset=Set-1, orientation=Ori-1, controls=EC-1, material=Material-1
0.75,
*Hourglass Stiffness
 384.615, , 0., 0.
*End Part
**
**
** ASSEMBLY
**
*Assembly, name=Assembly
**
*Instance, name=Part-1-1, part=Part-1
*End Instance
**
*Nset, nset=Load, instance=Part-1-1
   2,   3,  75,  76,  77,  78
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*Elset, elset=Load, instance=Part-1-1, generate
   63,  3213,    63
*Nset, nset=ROI, instance=Part-1-1
    4,    5,    7,    8,  194,  195
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*Elset, elset=ROI, instance=Part-1-1, generate
 3214,  4018,     1
*Nset, nset=Set-2, instance=Part-1-1
  10,  11, 375, 376, 377, 378
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*Elset, elset=Set-2, instance=Part-1-1, generate
 4081,  7231,    63
*End Assembly
**
** ELEMENT CONTROLS
**
*Section Controls, name=EC-1, hourglass=STIFFNESS
1., 1., 1.
**
** MATERIALS
**
*Material, name=Material-1
*Depvar
      4,
*User Material, constants=17
0.,       0.,  200000.,      0.3,       1., 0.257143, 0.357143, 0.642857
      1.5,      1.5, 0.982857,       2.,    1000.,     0.02,      0.5,       0.
       0.,
*User Output Variables
      2,
**
** BOUNDARY CONDITIONS
**
** Name: BC-1 Type: Displacement/Rotation
*Boundary
Load, 1, 1
Load, 2, 2
Load, 6, 6
** ----------------------------------------------------------------
**
** STEP: Step-1
**
*Step, name=Step-1, nlgeom=YES, inc=1000000
*Static
0.01, 1., 1e-05, 0.05
**
** BOUNDARY CONDITIONS
**
** Name: BC-1 Type: Displacement/Rotation
*Boundary
Load, 2, 2, 30.
** Name: BC-2 Type: Symmetry/Antisymmetry/Encastre
*Boundary
Set-2, ENCASTRE
**
** OUTPUT REQUESTS
**
*Restart, write, frequency=0
**
** FIELD OUTPUT: F-Output-1
**
*Output, field
*Node Output
COORD, RF, U
*Element Output, directions=YES
EVOL, LE, S, SDV, UVARM
*Output, history, frequency=0
*End Step
